// SBML level 2 version 4

model LotkaVolterra()

  // Compartments:
  compartment default = 1 volume;

  // Species:
  substanceOnly species prey in default = 6;
  substanceOnly species predador in default = 20;
  species s3 in default = 0; s3 is "s1";
  species s4 in default = 0; s4 is "s2";
  species s5 in default = 0; s5 is "s3";
  species s6 in default = 0; s6 is "s4";

  // Parameters:
  alpha = 0.6 substance;
  beta = 0.02 substance;
  gamma = 0.4 substance;
  delta = 0.02 substance;

  // Reactions:
  re1: s3 => prey; alpha*prey;
  re2: prey => s4; beta*prey*predador;
  re3: s6 => predador; delta*prey*predador;
  re4: predador => s5; gamma*predador;

  // Unit definitions:
  unit substance = mole;
  unit volume = litre;
  unit area = metre^2;
  unit length = metre;
  unit time = second;
end
